*Heading
** Job name: Job Model name: Model-1
** Generated by: Abaqus/CAE 2023
*Preprint, echo=NO, model=NO, history=NO, contact=NO
** ----------------------------------------------------------------
**
** PART INSTANCE: TOPBEAM
**
*System
          0.,      0.0127,          0.,          1.,      0.0127,          0.
          0.,0.0127000000000001,          1.
*Node
      1, 0.0450000018,           0., 0.0126999998
      2, 0.0450000018, -0.0126999998, 0.0126999998
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*Element, type=C3D8R
  1, 2034, 2035, 9619, 9600,  110,  111, 2011, 2010
  2, 2035, 2036, 9620, 9619,  111,  112, 2012, 2011
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*Nset, nset=TOPBEAM_Set-1, generate
     1,  18449,      1
*Elset, elset=TOPBEAM_Set-1, generate
     1,  14800,      1
*Elset, elset=_TOPBEAM_INSURF_S3
    1,    2,    3,   10,   11,   12
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*Elset, elset=_TOPBEAM_INSURF_S4
    41,    44,    47,    50,   413,   416
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*Elset, elset=_TOPBEAM_INSURF_S2
   66,   67,   68,   69,   70,   71
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*Elset, elset=_TOPBEAM_INSURF_S6
  111,  116,  121,  126,  131,  136
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*Elset, elset=_TOPBEAM_INSURF_S5
 2163, 2164, 2165, 2178, 2179, 2180
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*Surface, type=ELEMENT, name=TOPBEAM_INSURF
_TOPBEAM_INSURF_S3, S3
_TOPBEAM_INSURF_S4, S4
_TOPBEAM_INSURF_S2, S2
_TOPBEAM_INSURF_S6, S6
_TOPBEAM_INSURF_S5, S5
*Elset, elset=_TOPBEAM_BmW1_S6, generate
 1771,  1946,     5
*Elset, elset=_TOPBEAM_BmW1_S5
 1493, 1494, 1495, 1508, 1509, 1510
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*Surface, type=ELEMENT, name=TOPBEAM_BmW1
_TOPBEAM_BmW1_S6, S6
_TOPBEAM_BmW1_S5, S5
*Elset, elset=_TOPBEAM_BmW2_S6
  2731,  2736,  2741,  2746,  2751,  2756
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*Elset, elset=_TOPBEAM_BmW2_S4, generate
 2645,  2730,     5
*Surface, type=ELEMENT, name=TOPBEAM_BmW2
_TOPBEAM_BmW2_S6, S6
_TOPBEAM_BmW2_S4, S4
*Elset, elset=_TOPBEAM_BmW3_S6
 2061, 2066, 2071, 2076, 2081, 2086
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*Elset, elset=_TOPBEAM_BmW3_S3
 2151, 2152, 2153, 2166, 2167, 2168
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*Surface, type=ELEMENT, name=TOPBEAM_BmW3
_TOPBEAM_BmW3_S6, S6
_TOPBEAM_BmW3_S3, S3
** Section: Section-1
*Solid Section, elset=TOPBEAM_Set-1, material=STEEL
,
** ----------------------------------------------------------------
**
** PART INSTANCE: BOTBEAM
**
*System
          0.,      0.0127,          0.,         -1.,      0.0127,1.22464679914735e-16
-1.22464679914735e-16,0.0126999999999999,         -1.
*Node
  18450, 0.0450000018,           0., 0.0126999998
  18451, 0.0450000018, -0.0126999998, 0.0126999998
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*Element, type=C3D8R
14801, 20483, 20484, 28068, 28049, 18559, 18560, 20460, 20459
14802, 20484, 20485, 28069, 28068, 18560, 18561, 20461, 20460
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*Nset, nset=BOTBEAM_Set-1, generate
 18450,  36898,      1
*Elset, elset=BOTBEAM_Set-1, generate
 14801,  29600,      1
*Elset, elset=_BOTBEAM_INSURF_S3
14801,14802,14803,14810,14811,14812
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*Elset, elset=_BOTBEAM_INSURF_S4
 14841, 14844, 14847, 14850, 15213, 15216
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*Elset, elset=_BOTBEAM_INSURF_S2
14866,14867,14868,14869,14870,14871
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*Elset, elset=_BOTBEAM_INSURF_S6
14911,14916,14921,14926,14931,14936
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*Elset, elset=_BOTBEAM_INSURF_S5
16963,16964,16965,16978,16979,16980
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*Surface, type=ELEMENT, name=BOTBEAM_INSURF
_BOTBEAM_INSURF_S3, S3
_BOTBEAM_INSURF_S4, S4
_BOTBEAM_INSURF_S2, S2
_BOTBEAM_INSURF_S6, S6
_BOTBEAM_INSURF_S5, S5
*Elset, elset=_BOTBEAM_BmW1_S6, generate
16571, 16746,     5
*Elset, elset=_BOTBEAM_BmW1_S5
16293,16294,16295,16308,16309,16310
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*Surface, type=ELEMENT, name=BOTBEAM_BmW1
_BOTBEAM_BmW1_S6, S6
_BOTBEAM_BmW1_S5, S5
*Elset, elset=_BOTBEAM_BmW2_S6
 17531, 17536, 17541, 17546, 17551, 17556
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*Elset, elset=_BOTBEAM_BmW2_S4, generate
17445, 17530,     5
*Surface, type=ELEMENT, name=BOTBEAM_BmW2
_BOTBEAM_BmW2_S6, S6
_BOTBEAM_BmW2_S4, S4
*Elset, elset=_BOTBEAM_BmW3_S6
16861,16866,16871,16876,16881,16886
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*Elset, elset=_BOTBEAM_BmW3_S3
16951,16952,16953,16966,16967,16968
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*Surface, type=ELEMENT, name=BOTBEAM_BmW3
_BOTBEAM_BmW3_S6, S6
_BOTBEAM_BmW3_S3, S3
** Section: Section-1
*Solid Section, elset=BOTBEAM_Set-1, material=STEEL
,
** ----------------------------------------------------------------
**
** PART INSTANCE: TOPWASHER-1
**
*System
  -0.0299995,          0.,   -0.014287,   0.9700005,          0.,   -0.014287
*Node
  36899, 0.00403331174, 0.0016706523,           0.
  36900, 0.00308696297, 0.00308696297,           0.
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*Element, type=C3D8R
29601, 36966, 37007, 37030, 36965, 36900, 36941, 36964, 36899
29602, 37030, 37012, 37003, 36965, 36964, 36946, 36937, 36899
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*Nset, nset=TOPWASHER-1_Set-1, generate
36899, 37030,    1
*Elset, elset=TOPWASHER-1_Set-1, generate
29601, 29647,   1
*Elset, elset=_TOPWASHER-1_WSBOT_S1, generate
29601, 29647,   1
*Surface, type=ELEMENT, name=TOPWASHER-1_WSBOT
_TOPWASHER-1_WSBOT_S1, S1
*Elset, elset=_TOPWASHER-1_WSTOP_S2, generate
29601, 29647,   1
*Surface, type=ELEMENT, name=TOPWASHER-1_WSTOP
_TOPWASHER-1_WSTOP_S2, S2
** Section: Section-1
*Solid Section, elset=TOPWASHER-1_Set-1, material=STEEL
,
** ----------------------------------------------------------------
**
** PART INSTANCE: BOTWASHER-1
**
*System
-0.0300004625,          0.,      0.0127,0.9699995375,          0.,      0.0127
*Node
  37031, 0.00403331174, 0.0016706523,           0.
  37032, 0.00308696297, 0.00308696297,           0.
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*Element, type=C3D8R
29648, 37098, 37139, 37162, 37097, 37032, 37073, 37096, 37031
29649, 37162, 37144, 37135, 37097, 37096, 37078, 37069, 37031
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*Nset, nset=BOTWASHER-1_Set-1, generate
37031, 37162,    1
*Elset, elset=BOTWASHER-1_Set-1, generate
29648, 29694,   1
*Elset, elset=_BOTWASHER-1_WSBOT_S1, generate
29648, 29694,   1
*Surface, type=ELEMENT, name=BOTWASHER-1_WSBOT
_BOTWASHER-1_WSBOT_S1, S1
*Elset, elset=_BOTWASHER-1_WSTOP_S2, generate
29648, 29694,   1
*Surface, type=ELEMENT, name=BOTWASHER-1_WSTOP
_BOTWASHER-1_WSTOP_S2, S2
** Section: Section-1
*Solid Section, elset=BOTWASHER-1_Set-1, material=STEEL
,
** ----------------------------------------------------------------
**
** PART INSTANCE: NUT-1
**
*System
       -0.03,          0.,    0.014287,        0.97,          0.,    0.014287
*Node
  37163, 0.00366664678, 0.00151877489,           0.
  37164, 0.0028063301, 0.0028063301,           0.
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*Element, type=C3D8R
29695, 37164, 37163, 37199, 37206, 37215, 37214, 37250, 37257
29696, 37179, 37199, 37163, 37188, 37230, 37250, 37214, 37239
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*Nset, nset=NUT-1_Set-1, generate
37163, 37315,    1
*Elset, elset=NUT-1_Set-1, generate
29695, 29762,   1
*Elset, elset=_NUT-1_NB_S3
29695,29700,29701,29711,29718,29721,29725,29726,29729,29734,29735,29745,29752,29755,29759,29760
*Elset, elset=_NUT-1_NB_S4
29697,29710,29724,29728,29731,29744,29758,29762
*Elset, elset=_NUT-1_NB_S5
29712,29727,29746,29761
*Elset, elset=_NUT-1_NB_S6
29713,29723,29747,29757
*Surface, type=ELEMENT, name=NUT-1_NB
_NUT-1_NB_S3, S3
_NUT-1_NB_S4, S4
_NUT-1_NB_S6, S6
_NUT-1_NB_S5, S5
*Elset, elset=_NUT-1_NW_S1, generate
29695, 29728,   1
*Surface, type=ELEMENT, name=NUT-1_NW
_NUT-1_NW_S1, S1
** Section: Section-1
*Solid Section, elset=NUT-1_Set-1, material=STEEL
,
** ----------------------------------------------------------------
**
** PART INSTANCE: BOLT-1
**
*System
   -0.029999,          0.,   -0.019446,    0.970001,          0.,   -0.019446
*Node
  37316, 0.00396875013,           0., 0.0388937518
  37317, 0.00396875013,           0., 0.0337343737
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*Element, type=C3D8R
29763, 37796, 37475, 37476, 37797, 37423, 37334, 37335, 37424
29764, 37797, 37476, 37477, 37813, 37424, 37335, 37336, 37440
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*Nset, nset=BOLT-1_Set-1, generate
37316, 38149,    1
*Elset, elset=BOLT-1_Set-1, generate
29763, 30368,    1
*Elset, elset=_BOLT-1_BlW_S1, generate
30211, 30241,    1
*Surface, type=ELEMENT, name=BOLT-1_BlW
_BOLT-1_BlW_S1, S1
*Elset, elset=_BOLT-1_BN_S4
29763,29764,29765,29767,29775,29795,29796,29797,29799,29807
*Elset, elset=_BOLT-1_BN_S5
29776,29778,29779,29784,29786,29808,29810,29811,29816,29818
*Elset, elset=_BOLT-1_BN_S6
29777,29782,29783,29809,29814,29815
*Elset, elset=_BOLT-1_BN_S3
29780,29781,29791,29812,29813,29823
*Surface, type=ELEMENT, name=BOLT-1_BN
_BOLT-1_BN_S4, S4
_BOLT-1_BN_S5, S5
_BOLT-1_BN_S6, S6
_BOLT-1_BN_S3, S3
** Section: Section-1
*Solid Section, elset=BOLT-1_Set-1, material=STEEL
,
** ----------------------------------------------------------------
**
** PART INSTANCE: BPT-1
**
*System
   -0.029999,          0.,    0.016868,    0.970001,          0.,    0.016868
*Node
  38150,           0.,           0.,           0.
*Nset, nset=BPT-1-RefPt_
38150,
*Nset, nset=BPT-1_Set-1
38150,
** ----------------------------------------------------------------
**
** PART INSTANCE: NPT-1
**
*System
   -0.029999,          0.,    0.016868,    0.970001,          0.,    0.016868
*Node
  38151,           0.,           0.,           0.
*Nset, nset=NPT-1-RefPt_
38151,
*Nset, nset=NPT-1_Set-1
38151,
** ----------------------------------------------------------------
**
** PART INSTANCE: TOPWASHER-2
**
*System
5.00000000042133e-07,          0.,   -0.014287,   1.0000005,          0.,   -0.014287
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*Elset, elset=TOPWASHER-2_Set-1, generate
30369, 30415,   1
*Elset, elset=_TOPWASHER-2_WSBOT_S1, generate
30369, 30415,   1
*Surface, type=ELEMENT, name=TOPWASHER-2_WSBOT
_TOPWASHER-2_WSBOT_S1, S1
*Elset, elset=_TOPWASHER-2_WSTOP_S2, generate
30369, 30415,   1
*Surface, type=ELEMENT, name=TOPWASHER-2_WSTOP
_TOPWASHER-2_WSTOP_S2, S2
** Section: Section-1
*Solid Section, elset=TOPWASHER-2_Set-1, material=STEEL
,
** ----------------------------------------------------------------
**
** PART INSTANCE: TOPWASHER-3
**
*System
   0.0300005,          0.,   -0.014287,   1.0300005,          0.,   -0.014287
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*Elset, elset=TOPWASHER-3_Set-1, generate
30416, 30462,   1
*Elset, elset=_TOPWASHER-3_WSBOT_S1, generate
30416, 30462,   1
*Surface, type=ELEMENT, name=TOPWASHER-3_WSBOT
_TOPWASHER-3_WSBOT_S1, S1
*Elset, elset=_TOPWASHER-3_WSTOP_S2, generate
30416, 30462,   1
*Surface, type=ELEMENT, name=TOPWASHER-3_WSTOP
_TOPWASHER-3_WSTOP_S2, S2
** Section: Section-1
*Solid Section, elset=TOPWASHER-3_Set-1, material=STEEL
,
** ----------------------------------------------------------------
**
** PART INSTANCE: BOTWASHER-2
**
*System
-4.62500000047994e-07,          0.,      0.0127,0.9999995375,          0.,      0.0127
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*Elset, elset=BOTWASHER-2_Set-1, generate
30463, 30509,   1
*Elset, elset=_BOTWASHER-2_WSBOT_S1, generate
30463, 30509,   1
*Surface, type=ELEMENT, name=BOTWASHER-2_WSBOT
_BOTWASHER-2_WSBOT_S1, S1
*Elset, elset=_BOTWASHER-2_WSTOP_S2, generate
30463, 30509,   1
*Surface, type=ELEMENT, name=BOTWASHER-2_WSTOP
_BOTWASHER-2_WSTOP_S2, S2
** Section: Section-1
*Solid Section, elset=BOTWASHER-2_Set-1, material=STEEL
,
** ----------------------------------------------------------------
**
** PART INSTANCE: BOTWASHER-3
**
*System
0.0299995375,          0.,      0.0127,1.0299995375,          0.,      0.0127
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*Elset, elset=BOTWASHER-3_Set-1, generate
30510, 30556,   1
*Elset, elset=_BOTWASHER-3_WSBOT_S1, generate
30510, 30556,   1
*Surface, type=ELEMENT, name=BOTWASHER-3_WSBOT
_BOTWASHER-3_WSBOT_S1, S1
*Elset, elset=_BOTWASHER-3_WSTOP_S2, generate
30510, 30556,   1
*Surface, type=ELEMENT, name=BOTWASHER-3_WSTOP
_BOTWASHER-3_WSTOP_S2, S2
** Section: Section-1
*Solid Section, elset=BOTWASHER-3_Set-1, material=STEEL
,
** ----------------------------------------------------------------
**
** PART INSTANCE: NUT-2
**
*System
          0.,          0.,    0.014287,          1.,          0.,    0.014287
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*Elset, elset=NUT-2_Set-1, generate
30557, 30624,   1
*Elset, elset=_NUT-2_NB_S3
30557,30562,30563,30573,30580,30583,30587,30588,30591,30596,30597,30607,30614,30617,30621,30622
*Elset, elset=_NUT-2_NB_S4
30559,30572,30586,30590,30593,30606,30620,30624
*Elset, elset=_NUT-2_NB_S5
30574,30589,30608,30623
*Elset, elset=_NUT-2_NB_S6
30575,30585,30609,30619
*Surface, type=ELEMENT, name=NUT-2_NB
_NUT-2_NB_S3, S3
_NUT-2_NB_S4, S4
_NUT-2_NB_S6, S6
_NUT-2_NB_S5, S5
*Elset, elset=_NUT-2_NW_S1, generate
30557, 30590,   1
*Surface, type=ELEMENT, name=NUT-2_NW
_NUT-2_NW_S1, S1
** Section: Section-1
*Solid Section, elset=NUT-2_Set-1, material=STEEL
,
** ----------------------------------------------------------------
**
** PART INSTANCE: NUT-3
**
*System
        0.03,          0.,    0.014287,        1.03,          0.,    0.014287
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*Elset, elset=NUT-3_Set-1, generate
30625, 30692,   1
*Elset, elset=_NUT-3_NB_S3
30625,30630,30631,30641,30648,30651,30655,30656,30659,30664,30665,30675,30682,30685,30689,30690
*Elset, elset=_NUT-3_NB_S4
30627,30640,30654,30658,30661,30674,30688,30692
*Elset, elset=_NUT-3_NB_S5
30642,30657,30676,30691
*Elset, elset=_NUT-3_NB_S6
30643,30653,30677,30687
*Surface, type=ELEMENT, name=NUT-3_NB
_NUT-3_NB_S3, S3
_NUT-3_NB_S4, S4
_NUT-3_NB_S6, S6
_NUT-3_NB_S5, S5
*Elset, elset=_NUT-3_NW_S1, generate
30625, 30658,   1
*Surface, type=ELEMENT, name=NUT-3_NW
_NUT-3_NW_S1, S1
** Section: Section-1
*Solid Section, elset=NUT-3_Set-1, material=STEEL
,
** ----------------------------------------------------------------
**
** PART INSTANCE: BPT-2
**
*System
1.000000000001e-06,          0.,    0.016868,    1.000001,          0.,    0.016868
*Node
  38986,           0.,           0.,           0.
*Nset, nset=BPT-2-RefPt_
38986,
*Nset, nset=BPT-2_Set-1
38986,
** ----------------------------------------------------------------
**
** PART INSTANCE: BPT-3
**
*System
    0.030001,          0.,    0.016868,    1.030001,          0.,    0.016868
*Node
  38987,           0.,           0.,           0.
*Nset, nset=BPT-3-RefPt_
38987,
*Nset, nset=BPT-3_Set-1
38987,
** ----------------------------------------------------------------
**
** PART INSTANCE: NPT-2
**
*System
1.000000000001e-06,          0.,    0.016868,    1.000001,          0.,    0.016868
*Node
  38988,           0.,           0.,           0.
*Nset, nset=NPT-2-RefPt_
38988,
*Nset, nset=NPT-2_Set-1
38988,
** ----------------------------------------------------------------
**
** PART INSTANCE: NPT-3
**
*System
    0.030001,          0.,    0.016868,    1.030001,          0.,    0.016868
*Node
  38989,           0.,           0.,           0.
*Nset, nset=NPT-3-RefPt_
38989,
*Nset, nset=NPT-3_Set-1
38989,
** ----------------------------------------------------------------
**
** PART INSTANCE: BOLT-2
**
*System
1.000000000001e-06,          0.,   -0.019446,    1.000001,          0.,   -0.019446
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*Elset, elset=BOLT-2_Set-1, generate
30693, 31298,    1
*Elset, elset=_BOLT-2_BlW_S1, generate
31141, 31171,    1
*Surface, type=ELEMENT, name=BOLT-2_BlW
_BOLT-2_BlW_S1, S1
*Elset, elset=_BOLT-2_BN_S4
30693,30694,30695,30697,30705,30725,30726,30727,30729,30737
*Elset, elset=_BOLT-2_BN_S5
30706,30708,30709,30714,30716,30738,30740,30741,30746,30748
*Elset, elset=_BOLT-2_BN_S6
30707,30712,30713,30739,30744,30745
*Elset, elset=_BOLT-2_BN_S3
30710,30711,30721,30742,30743,30753
*Surface, type=ELEMENT, name=BOLT-2_BN
_BOLT-2_BN_S4, S4
_BOLT-2_BN_S5, S5
_BOLT-2_BN_S6, S6
_BOLT-2_BN_S3, S3
** Section: Section-1
*Solid Section, elset=BOLT-2_Set-1, material=STEEL
,
** ----------------------------------------------------------------
**
** PART INSTANCE: BOLT-3
**
*System
    0.030001,          0.,   -0.019446,    1.030001,          0.,   -0.019446
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*Elset, elset=BOLT-3_Set-1, generate
31299, 31904,    1
*Elset, elset=_BOLT-3_BlW_S1, generate
31747, 31777,    1
*Surface, type=ELEMENT, name=BOLT-3_BlW
_BOLT-3_BlW_S1, S1
*Elset, elset=_BOLT-3_BN_S4
31299,31300,31301,31303,31311,31331,31332,31333,31335,31343
*Elset, elset=_BOLT-3_BN_S5
31312,31314,31315,31320,31322,31344,31346,31347,31352,31354
*Elset, elset=_BOLT-3_BN_S6
31313,31318,31319,31345,31350,31351
*Elset, elset=_BOLT-3_BN_S3
31316,31317,31327,31348,31349,31359
*Surface, type=ELEMENT, name=BOLT-3_BN
_BOLT-3_BN_S4, S4
_BOLT-3_BN_S5, S5
_BOLT-3_BN_S6, S6
_BOLT-3_BN_S3, S3
** Section: Section-1
*Solid Section, elset=BOLT-3_Set-1, material=STEEL
,
*System
*Nset, nset=BOTS_NDS, unsorted
18508,18511,18514,18512,18515,18504
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*Nset, nset=OutNodes
18546,
*Nset, nset=TOPS_NDS, unsorted
    1,    4,    5,    7,    8,   11
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** Constraint: BNEQ1-1
*Equation
2
BPT-1_Set-1, 1, 1.
NPT-1_Set-1, 1, -1.
** Constraint: BNEQ1-2
*Equation
2
BPT-1_Set-1, 2, 1.
NPT-1_Set-1, 2, -1.
** Constraint: BNEQ1-4
*Equation
2
BPT-1_Set-1, 4, 1.
NPT-1_Set-1, 4, -1.
** Constraint: BNEQ1-5
*Equation
2
BPT-1_Set-1, 5, 1.
NPT-1_Set-1, 5, -1.
** Constraint: BNEQ1-6
*Equation
2
BPT-1_Set-1, 6, 1.
NPT-1_Set-1, 6, -1.
** Constraint: BNEQ2-1
*Equation
2
BPT-2_Set-1, 1, 1.
NPT-2_Set-1, 1, -1.
** Constraint: BNEQ2-2
*Equation
2
BPT-2_Set-1, 2, 1.
NPT-2_Set-1, 2, -1.
** Constraint: BNEQ2-4
*Equation
2
BPT-2_Set-1, 4, 1.
NPT-2_Set-1, 4, -1.
** Constraint: BNEQ2-5
*Equation
2
BPT-2_Set-1, 5, 1.
NPT-2_Set-1, 5, -1.
** Constraint: BNEQ2-6
*Equation
2
BPT-2_Set-1, 6, 1.
NPT-2_Set-1, 6, -1.
** Constraint: BNEQ3-1
*Equation
2
BPT-3_Set-1, 1, 1.
NPT-3_Set-1, 1, -1.
** Constraint: BNEQ3-2
*Equation
2
BPT-3_Set-1, 2, 1.
NPT-3_Set-1, 2, -1.
** Constraint: BNEQ3-4
*Equation
2
BPT-3_Set-1, 4, 1.
NPT-3_Set-1, 4, -1.
** Constraint: BNEQ3-5
*Equation
2
BPT-3_Set-1, 5, 1.
NPT-3_Set-1, 5, -1.
** Constraint: BNEQ3-6
*Equation
2
BPT-3_Set-1, 6, 1.
NPT-3_Set-1, 6, -1.
** Constraint: BPC-1
*Coupling, constraint name=BPC-1, ref node=BPT-1_Set-1, surface=BOLT-1_BN
*Distributing, weighting method=UNIFORM, coupling=STRUCTURAL
** Constraint: BPC-2
*Coupling, constraint name=BPC-2, ref node=BPT-2_Set-1, surface=BOLT-2_BN
*Distributing, weighting method=UNIFORM, coupling=STRUCTURAL
** Constraint: BPC-3
*Coupling, constraint name=BPC-3, ref node=BPT-3_Set-1, surface=BOLT-3_BN
*Distributing, weighting method=UNIFORM, coupling=STRUCTURAL
** Constraint: BW-1
*Tie, name=BW-1, adjust=yes
BOLT-1_BlW, TOPWASHER-1_WSTOP
** Constraint: BW-2
*Tie, name=BW-2, adjust=yes
BOLT-2_BlW, TOPWASHER-2_WSTOP
** Constraint: BW-3
*Tie, name=BW-3, adjust=yes
BOLT-3_BlW, TOPWASHER-3_WSTOP
** Constraint: BmBW-1
*Tie, name=BmBW-1, adjust=yes
BOTWASHER-1_WSTOP, BOTBEAM_BmW3
** Constraint: BmBW-2
*Tie, name=BmBW-2, adjust=yes
BOTWASHER-2_WSTOP, BOTBEAM_BmW2
** Constraint: BmBW-3
*Tie, name=BmBW-3, adjust=yes
BOTWASHER-3_WSTOP, BOTBEAM_BmW1
** Constraint: BmTW-1
*Tie, name=BmTW-1, adjust=yes
TOPWASHER-1_WSBOT, TOPBEAM_BmW1
** Constraint: BmTW-2
*Tie, name=BmTW-2, adjust=yes
TOPWASHER-2_WSBOT, TOPBEAM_BmW2
** Constraint: BmTW-3
*Tie, name=BmTW-3, adjust=yes
TOPWASHER-3_WSBOT, TOPBEAM_BmW3
** Constraint: NPC-1
*Coupling, constraint name=NPC-1, ref node=NPT-1_Set-1, surface=NUT-1_NB
*Distributing, weighting method=UNIFORM, coupling=STRUCTURAL
** Constraint: NPC-2
*Coupling, constraint name=NPC-2, ref node=NPT-2_Set-1, surface=NUT-2_NB
*Distributing, weighting method=UNIFORM, coupling=STRUCTURAL
** Constraint: NPC-3
*Coupling, constraint name=NPC-3, ref node=NPT-3_Set-1, surface=NUT-3_NB
*Distributing, weighting method=UNIFORM, coupling=STRUCTURAL
** Constraint: NW-1
*Tie, name=NW-1, adjust=yes
NUT-1_NW, BOTWASHER-1_WSBOT
** Constraint: NW-2
*Tie, name=NW-2, adjust=yes
NUT-2_NW, BOTWASHER-2_WSBOT
** Constraint: NW-3
*Tie, name=NW-3, adjust=yes
NUT-3_NW, BOTWASHER-3_WSBOT
**
** MATERIALS
**
*Material, name=STEEL
*Density
7800.,
*Elastic
 2e+11, 0.29
** ----------------------------------------------------------------
**
** STEP: Fixed-Int-Modal
**
*Step, name=Fixed-Int-Modal, nlgeom=NO, perturbation
*Frequency, eigensolver=Lanczos, sim, acoustic coupling=on, normalization=mass
60, , , , ,
**
** BOUNDARY CONDITIONS
**
** Name: BOTFIX Type: Symmetry/Antisymmetry/Encastre
*Boundary
BOTS_NDS, ENCASTRE
** Name: TOPFIX Type: Symmetry/Antisymmetry/Encastre
*Boundary
TOPS_NDS, ENCASTRE
**
** OUTPUT REQUESTS
**
*Restart, write, frequency=0
**
** FIELD OUTPUT: F-Output-1
**
*Output, field
*Node Output
U,
**
** HISTORY OUTPUT: H-Output-1
**
*Output, history
*Energy Output
ALLKE, ALLSE
*End Step
** ----------------------------------------------------------------
**
** STEP: HCBCMS
**
*Step, name=HCBCMS, nlgeom=NO
*Substructure Generate, overwrite, type=Z1, recovery matrix=YES, nset=OutNodes, mass matrix=YES
*Select Eigenmodes, generate
1, 20, 1
*Damping Controls, structural=COMBINED, viscous=COMBINED
*Retained Nodal Dofs, sorted=NO
TOPS_NDS, 1, 3
BOTS_NDS, 1, 3
**
** LOAD CASES
**
*Substructure Load Case, name=LCASE
** Name: BoltLoad-1   Type: Concentrated force   Scale factor: 1
*Cload
BPT-1_Set-1, 3, 1.
** Name: BoltLoad-2   Type: Concentrated force   Scale factor: 1
*Cload
BPT-2_Set-1, 3, 1.
** Name: BoltLoad-3   Type: Concentrated force   Scale factor: 1
*Cload
BPT-3_Set-1, 3, 1.
** Name: NutLoad-1   Type: Concentrated force   Scale factor: 1
*Cload
NPT-1_Set-1, 3, -1.
** Name: NutLoad-2   Type: Concentrated force   Scale factor: 1
*Cload
NPT-2_Set-1, 3, -1.
** Name: NutLoad-3   Type: Concentrated force   Scale factor: 1
*Cload
NPT-3_Set-1, 3, -1.
*Substructure Matrix Output, FILE NAME=Modelmats, MASS=YES, STIFFNESS=YES, SLOAD=YES, RECOVERY MATRIX=YES
*End Step
